*Heading
** Job name: Job-1 Model name: Model-1
** Generated by: Abaqus/CAE 2016
*Preprint, echo=NO, model=NO, history=NO, contact=NO
**
** PARTS
**
*Part, name=Part-1
*End Part
**
**
** ASSEMBLY
**
*Assembly, name=Assembly
**
*Instance, name=Part-1-1, part=Part-1
*Node
      1,          12.,   5.98190451,           0.
      2,          12.,           0.,           0.
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*Element, type=C3D20R
 1,  23,  63,  12,   1, 142, 182, 131, 120, 242, 241, 240, 239, 243, 244, 245,
    246, 248, 247, 249, 250
 2,  63,  64,  13,  12, 182, 183, 132, 131, 253, 252, 251, 241, 254, 255, 256,
    244, 247, 257, 258, 249
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*Nset, nset=AssignSection, generate
   1,  785,    1
*Elset, elset=AssignSection, generate
  1,  96,   1
** Section: Section-1
*Solid Section, elset=AssignSection, material=Material-1
,
*End Instance
**
*Nset, nset=edgeCorner, instance=Part-1-1
  10,  41,  42,  43,  52,  53,  54, 129, 160, 161, 162, 171, 172, 173
*Nset, nset=extremeCorner, instance=Part-1-1
   9,  11, 128, 130
*Nset, nset=midEdge, instance=Part-1-1
 464, 467, 470, 511, 514, 556
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*Nset, nset=midMid, instance=Part-1-1
 469, 515, 560, 605, 613, 621, 629
*Nset, nset=xAxisYdirCon, instance=Part-1-1
   2,   3,   5,  15,  16,  17
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*Nset, nset=xyPlaneZdir, instance=Part-1-1
   1,   2,   3,   4,   5,   6
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*Nset, nset=yAxisXdir, instance=Part-1-1
   7,   8,   9,  33,  34,  35
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*End Assembly
**
** MATERIALS
**
*Material, name=Material-1
*Elastic
 2.9e+07, 0.3
*Plastic
   60000.,0.
 3.22e+06,1.
** ----------------------------------------------------------------
**
** STEP: Step-1
**
*Step, name=Step-1, nlgeom=NO, inc=1000
*Static
0.0001, 1., 1e-50, 0.1
**
** BOUNDARY CONDITIONS
**
** Name: BC-1 Type: Displacement/Rotation
*Boundary
xAxisYdirCon, 2, 2
xAxisYdirCon, 4, 4
xAxisYdirCon, 6, 6
** Name: xyPlaneZaxisBC Type: Displacement/Rotation
*Boundary
xyPlaneZdir, 3, 3
xyPlaneZdir, 4, 4
xyPlaneZdir, 5, 5
** Name: yAxisXdirBC Type: Displacement/Rotation
*Boundary
yAxisXdir, 1, 1
yAxisXdir, 5, 5
yAxisXdir, 6, 6
**
** LOADS
**
** Name: edgeCornerForce   Type: Concentrated force
*Cload
edgeCorner, 2, -2e+08
** Name: extremeCornerForce   Type: Concentrated force
*Cload
extremeCorner, 2, -1e+08
** Name: midEdgeBC   Type: Concentrated force
*Cload
midEdge, 2, 4e+08
** Name: midMidForce   Type: Concentrated force
*Cload
midMid, 2, 8e+08
**
** OUTPUT REQUESTS
**
*Restart, write, frequency=0
**
** FIELD OUTPUT: F-Output-1
**
*Output, field, variable=PRESELECT
**
** HISTORY OUTPUT: H-Output-1
**
*Output, history, variable=PRESELECT
*End Step
